// SBML level 3 version 2

model branched_network()

  // Compartments:
  compartment default_compartment = 1;

  // Species:
  species A in default_compartment = 8;
  species B in default_compartment = 0;
  species C in default_compartment = 0;
  species D in default_compartment = 0;
  species E in default_compartment = 0;
  species F in default_compartment = 0;

  // Parameters:
  k1 = 0.4;
  k2 = 0.3;
  kf1 = 0.25;
  kr1 = 0.15;
  Vmax = 1.8;
  Km = 0.9;
  kf2 = 0.1;
  kr2 = 0.05;

  // Reactions:
  J0: A => B; k1*A;
  J1: B => C + D; k2*B;
  J2: C + D -> E; kf1*C*D - kr1*E;
  J3: D => F; Vmax*D/(Km + D);
  J4: E + F -> A; kf2*E*F - kr2*A;
end
