// SBML level 3 version 2

model reversible_pathway()

  // Compartments:
  compartment default_compartment = 1;

  // Species:
  species A in default_compartment = 6;
  species B in default_compartment = 1;
  species C in default_compartment = 0;
  species D in default_compartment = 0;
  species E in default_compartment = 0;

  // Parameters:
  kf1 = 0.5;
  kr1 = 0.3;
  kf2 = 0.2;
  kr2 = 0.4;
  kf3 = 0.6;
  kr3 = 0.25;
  kf4 = 0.15;
  kr4 = 0.1;

  // Reactions:
  J0: A -> B; kf1*A - kr1*B;
  J1: B + B -> C; kf2*B*B - kr2*C;
  J2: C -> D + E; kf3*C - kr3*D*E;
  J3: D + E -> A + A; kf4*D*E - kr4*A*A;
end
